New "Line.CMT_28FR_1762" phases=1 bus1="790881.1" bus2="28FR1762.1" r1=0.001 r0=0.001 x1=0.0 x0=0.0 c1=0.0 c0=0.0  switch = T length=0.00100
New "Line.CMT_28CF_889" phases=1 bus1="789661.2" bus2="28CF889.2" r1=0.001 r0=0.001 x1=0.0 x0=0.0 c1=0.0 c0=0.0  switch = T length=0.00100
New "Line.CMT_28FR_741" phases=3 bus1="793631.1.2.3" bus2="28FR741.1.2.3" r1=0.001 r0=0.001 x1=0.0 x0=0.0 c1=0.0 c0=0.0  switch = T length=0.00100
New "Line.CMT_28FR_1859" phases=2 bus1="795261.3.1" bus2="28FR1859.3.1" r1=0.001 r0=0.001 x1=0.0 x0=0.0 c1=0.0 c0=0.0  switch = T length=0.00100
New "Line.CMT_28CS_1866" phases=3 bus1="799181.1.2.3" bus2="28CS1866.1.2.3" r1=0.001 r0=0.001 x1=0.0 x0=0.0 c1=0.0 c0=0.0  switch = T length=0.00100
New "Line.CMT_28CF_1865" phases=1 bus1="799191.3" bus2="28CF1865.3" r1=0.001 r0=0.001 x1=0.0 x0=0.0 c1=0.0 c0=0.0  switch = T length=0.00100
New "Line.CMT_28RL_314" phases=3 bus1="348311.1.2.3" bus2="28RL314.1.2.3" r1=0.001 r0=0.001 x1=0.0 x0=0.0 c1=0.0 c0=0.0  switch = T length=0.00100
New "Line.CMT_28FR_325" phases=3 bus1="240061.1.2.3" bus2="28FR325.1.2.3" r1=0.001 r0=0.001 x1=0.0 x0=0.0 c1=0.0 c0=0.0  switch = T length=0.00100
New "Line.CMT_28CF_321" phases=3 bus1="153851.1.2.3" bus2="28CF321.1.2.3" r1=0.001 r0=0.001 x1=0.0 x0=0.0 c1=0.0 c0=0.0  switch = T length=0.00100
New "Line.CMT_28CF_329" phases=1 bus1="141591.1" bus2="28CF329.1" r1=0.001 r0=0.001 x1=0.0 x0=0.0 c1=0.0 c0=0.0  switch = T length=0.00100
New "Line.CMT_28CF_327" phases=3 bus1="141581.1.2.3" bus2="28CF327.1.2.3" r1=0.001 r0=0.001 x1=0.0 x0=0.0 c1=0.0 c0=0.0  switch = T length=0.00100
New "Line.CMT_28CF_831" phases=3 bus1="587141.1.2.3" bus2="28CF831.1.2.3" r1=0.001 r0=0.001 x1=0.0 x0=0.0 c1=0.0 c0=0.0  switch = T length=0.00100
New "Line.CMT_28FR_323" phases=3 bus1="649221.1.2.3" bus2="28FR323.1.2.3" r1=0.001 r0=0.001 x1=0.0 x0=0.0 c1=0.0 c0=0.0  switch = T length=0.00100
New "Line.CMT_28CS_814" phases=3 bus1="476291.1.2.3" bus2="28CS814.1.2.3" r1=0.001 r0=0.001 x1=0.0 x0=0.0 c1=0.0 c0=0.0  switch = T length=0.00100
New "Line.CMT_28CF_1370" phases=3 bus1="701871.1.2.3" bus2="28CF1370.1.2.3" r1=0.001 r0=0.001 x1=0.0 x0=0.0 c1=0.0 c0=0.0  switch = T length=0.00100
New "Line.CMT_28CF_1285" phases=3 bus1="727761.1.2.3" bus2="28CF1285.1.2.3" r1=0.001 r0=0.001 x1=0.0 x0=0.0 c1=0.0 c0=0.0  switch = T length=0.00100
New "Line.CMT_28CF_1375" phases=1 bus1="742011.1" bus2="28CF1375.1" r1=0.001 r0=0.001 x1=0.0 x0=0.0 c1=0.0 c0=0.0  switch = T length=0.00100
New "Line.CMT_28FR_326" phases=3 bus1="696711.1.2.3" bus2="28FR326.1.2.3" r1=0.001 r0=0.001 x1=0.0 x0=0.0 c1=0.0 c0=0.0  switch = T length=0.00100
New "Line.CMT_28FR_324" phases=3 bus1="83431.1.2.3" bus2="28FR324.1.2.3" r1=0.001 r0=0.001 x1=0.0 x0=0.0 c1=0.0 c0=0.0  switch = T length=0.00100
New "Line.CMT_28CF_318" phases=1 bus1="135951.1" bus2="28CF318.1" r1=0.001 r0=0.001 x1=0.0 x0=0.0 c1=0.0 c0=0.0  switch = T length=0.00100
New "Line.CMT_28RL_1562" phases=3 bus1="773951.1.2.3" bus2="28RL1562.1.2.3" r1=0.001 r0=0.001 x1=0.0 x0=0.0 c1=0.0 c0=0.0  switch = T length=0.00100
